*Heading
 Frequency analysis of a coupling
** Job name: coupling Model name: coupling
** Generated by: Abaqus/CAE 2018
*Preprint, echo=NO, model=NO, history=NO, contact=NO
**
** PARTS
**
*Part, name=coupling
*Node
      1, 0.0199999996,           0., 0.00999999978
      2, 0.0199999996,           0., 0.0599999987
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*Element, type=C3D4
    1, 2921, 2922, 2923, 2924
    2, 2921, 2925, 2923, 2926
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*Nset, nset=Set-1, generate
    1,  6999,     1
*Elset, elset=Set-1, generate
     1,  33241,      1
** Section: Section-coupling
*Solid Section, elset=Set-1, material=steel
,
*End Part
**
**
** ASSEMBLY
**
*Assembly, name=Assembly
**
*Instance, name=coupling-1, part=coupling
*End Instance
**
*Nset, nset=Set-1, instance=coupling-1
   2,  43,  44,  45,  46,  47
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*Elset, elset=Set-1, instance=coupling-1
  1189,  2024,  2496,  3677,  3882,  3920
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*Nset, nset=Set-2, instance=coupling-1
    3,    5,    7,    9,   11,   13
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*Elset, elset=Set-2, instance=coupling-1
    81,   125,   247,   313,   518,   612
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*End Assembly
**
** MATERIALS
**
*Material, name=steel
*Density
7800.,
*Elastic
 2.06e+11, 0.3
** ----------------------------------------------------------------
**
** STEP: Step-Model
**
*Step, name=Step-Model, nlgeom=NO, perturbation
Model analysis of a coupling
*Frequency, eigensolver=Lanczos, sim, acoustic coupling=on, normalization=mass
30, , , , ,
**
** BOUNDARY CONDITIONS
**
** Name: BC-1 Type: Displacement/Rotation
*Boundary
Set-1, 1, 1
Set-1, 2, 2
Set-1, 3, 3
Set-1, 4, 4
Set-1, 5, 5
** Name: BC-2 Type: Symmetry/Antisymmetry/Encastre
*Boundary
Set-2, ZSYMM
**
** OUTPUT REQUESTS
**
*Restart, write, frequency=0
**
** FIELD OUTPUT: F-Output-1
**
*Output, field, variable=PRESELECT
*End Step
